// COMSOL Multiphysics 5.5.0.359 model "defect_thick_center.mph"
// Outline of the model tree

Parameters
  freq_init = 10[Hz]
  freq_final = 100[Hz]
  t = 0[s]
  t_stop = 5[s]
  t_final = 3[s]
  t_smooth = .1[s]
  N_t = frame_rate*t_final
  speed_factor = 1
  frame_rate = 2000[Hz]
  a = .05[m]
  A_init = .0005[m]
  A_final = .000025[m]
  A = A_final +(A_init - A_final)*exp(-t/tau)
  tau = t_stop/5
  u_x = A*chirp_wave*flc2hs((t_stop-t)[1/s],t_smooth[1/s])*flc2hs((t-t_smooth)[1/s],t_smooth[1/s])
  u_y = A*chirp_wave*flc2hs((t_stop-t)[1/s],t_smooth[1/s])*flc2hs((t-t_smooth)[1/s],t_smooth[1/s])
  u_z = A*chirp_wave*flc2hs((t_stop-t)[1/s],t_smooth[1/s])*flc2hs((t-t_smooth)[1/s],t_smooth[1/s])
  chirp_wave = chirp(t[1/s],freq_init[1/Hz],min(t_stop[1/s],t_final[1/s]),freq_final[1/Hz])
  N_eig = 100
  A_pluck = .0005[m]
  damping_freq1 = 12.5 [Hz]
  damping_freq2 = 15.5 [Hz]
  crit_damping_frac1 = 0.01749
  crit_damping_frac2 = 0.01999
  E_jello = 9000[Pa]
  E_clay = 5[MPa]
  rho_jello = 1270[kg/m^3]
  rho_clay = 7620[kg/m^3]
  nu_jello = .45
  nu_clay = .3
  defect_offset_x = 0*a/10
  defect_offset_y = 0*a/10
  defect_offset_z = 0*a/10
  defect_size_x = 5*a/10
  defect_size_y = 6*a/10
  defect_size_z = 5*a/10
  defect_end_x = a/2 + defect_offset_x + defect_size_x/2
  defect_start_x = a/2 - defect_offset_x - defect_size_x/2
  defect_end_y = a/2 + defect_offset_y + defect_size_y/2
  defect_start_y = a/2 - defect_offset_y - defect_size_y/2
  defect_end_z = a/2 + defect_offset_z + defect_size_z/2
  defect_start_z = a/2 - defect_offset_z - defect_size_z/2

Functions
  extm1: MATLAB (disabled) | funcs = {chirp, "t,f0,t1,f1"}

Common definitions
  mpf1: ParticipationFactors

Geometry
  geom1 "Geometry 1" (3D, length unit m)
    blk2: Block "Block defect"
      pos = {a/2 + defect_offset_x, a/2 + defect_offset_y, a/2 + defect_offset_z}
      base = center
      size = {defect_size_x, defect_size_y, defect_size_z}
    blk1: Block | size = {a/2 - defect_size_x/2 + defect_offset_x, a, a}
    blk3: Block
      pos = {a/2 + defect_size_x/2 + defect_offset_x, 0, 0}
      size = {a/2 - defect_size_x/2 - defect_offset_x, a, a}
    blk4: Block
      pos = {a/2 - defect_size_x/2 + defect_offset_x, 0, 0}
      size = {defect_size_x, a, a/2 - defect_size_z/2 + defect_offset_z}
    blk5: Block
      pos = {a/2 - defect_size_x/2 + defect_offset_x, 0, a/2 + defect_size_z/2 + defect_offset_z}
      size = {defect_size_x, a, a/2 - defect_size_z/2 - defect_offset_z}
    blk6: Block
      pos = {a/2 - defect_size_x/2 + defect_offset_x, 0, a/2 - defect_size_z/2 + defect_offset_z}
      size = {defect_size_x, a/2 - defect_size_y/2 + defect_offset_y, defect_size_z}
    blk7: Block
      pos = {a/2 - defect_size_x/2 + defect_offset_x, a/2 + defect_size_y/2 + defect_offset_y, a/2 - defect_size_z/2 + defect_offset_z}
      size = {defect_size_x, a/2 - defect_size_y/2 - defect_offset_y, defect_size_z}
    fin: Finalize "Form Union"

Physics
  solid: SolidMechanics on all domains
    dependent variable u = {u, v, w}
    lemm1: LinearElasticModel "Linear Elastic Material 1" (default)
      E_mat = userdef
      E = E_jello
      nu_mat = userdef
      nu = nu_jello
      rho_mat = userdef
      rho = rho_jello
      dmp1: Damping on all domains
        InputParameters = DampingRatios
        f1 = damping_freq1
        zeta1 = crit_damping_frac1
        f2 = damping_freq2
        zeta2 = crit_damping_frac2
    free1: Free (default)
    init1: init "Initial Values 1" (default)
    disp1: Displacement2 "Prescribed Displacement 1" on boundaries 3, 8, 29 | Direction = {1, 1, 1}; U0 = {0, 0, 0}
    disp2: Displacement2 "Top Plane Push" on boundaries 4, 15, 32
      Direction = {1, 1, 1}
      U0 = {A_pluck, A_pluck, -A_pluck}
    disp5: Displacement0 "Top Right Twist" (disabled) on points 32
      Notation = StandardNotation
      Direction = {1, 1, 0}
      U0 = {-A_pluck*5, A_pluck*5, 0}
    disp3: Displacement0 "Top Right Pluck" (disabled) on points 32
      Notation = StandardNotation
      Direction = {1, 1, 1}
      U0 = {A_pluck*5, A_pluck*5, A_pluck*5}
    disp4: Displacement0 "Top Front Pluck" (disabled) on points 30
      Notation = StandardNotation
      Direction = {1, 1, 1}
      U0 = {A_pluck*5, A_pluck*5, A_pluck*5}
    disp6: Displacement0 "Top Left Pluck" (disabled) on points 2
      Direction = {1, 1, 1}
      U0 = {-A_pluck*5, A_pluck*5, A_pluck*5}
    disp7: Displacement0 "Top Back Pluck" (disabled) on points 4
      Direction = {1, 1, 1}
      U0 = {-A_pluck*5, A_pluck*5, A_pluck*5}
    lemm2: LinearElasticModel "Linear Elastic Material 2" on domains 5
      E_mat = userdef
      E = E_clay
      nu_mat = userdef
      nu = nu_clay
      rho_mat = userdef
      rho = rho_clay
      dmp2: Damping on all domains
        DampingType = RayleighDamping
        InputParameters = DampingRatios
        f1 = damping_freq1
        zeta1 = crit_damping_frac1
        f2 = damping_freq2
        zeta2 = crit_damping_frac2

Mesh
  mesh1 "Mesh 1"
    map1: Map "Mapped 1" on boundaries 4, 15, 32
    ftet1: FreeTet "Free Tetrahedral 1" (disabled) on remaining entities
    swe1: Sweep "Swept 1" on domains 1-7

Studies
  std1 "Study 1: Transient Analysis"
    stat: Stationary
    time: Transient "Time Dependent"
      tlist = range(0,(t_final-0)/(N_t-1),t_final)
      disabledphysics = {solid/disp2, solid/disp3, solid/disp4, solid/disp5, solid/disp6, solid/disp7}
  std2 "Study 2: Modal Analysis"
    eig: Eigenfrequency
      neigs = N_eig
      shift = 1[Hz]
      disabledphysics = {solid/disp2, solid/disp3, solid/disp4, solid/disp5, solid/disp6, solid/disp7}

Solver configurations
  sol1 "Solution 1" (study std1)
    v1: Variables "Dependent Variables 1"
    s1: Stationary "Stationary Solver 1"
      fc1: FullyCoupled | linsolver = d1
      d1: Direct "Suggested Direct Solver (solid)"
    su1: StoreSolution "Solution Store 1"
    v2: Variables "Dependent Variables 2" | initmethod = sol; notsolmethod = sol
      comp1_u: Field "Displacement field (comp1.u)" | scalemethod = manual; scaleval = 1e-2*0.0866025403784
    t1: Time "Time-Dependent Solver 1"
      tlist = range(0,(t_final-0)/(N_t-1),t_final)
      timemethod = genalpha
      tstepsgenalpha = strict
      fc1: FullyCoupled | linsolver = d1
      d1: Direct "Suggested Direct Solver (solid)"
  sol2 "Solution 2" (study std2)
    v1: Variables "Dependent Variables 1"
    e1: Eigenvalue "Eigenvalue Solver 1" | eigvfunscale = maximum; eigvfunscaleparam = 8.66E-8
      dDef: Direct
  sol3 "Solution Store 1" (study std1)

Datasets
  dset1: Solution | solution = sol1
  dset2: Solution | solution = sol2
  dset3: Solution | solution = sol3

Evaluation groups
  std2EvgFrq: EvaluationGroup "Eigenfrequencies (Study 2)" | data = dset2
    gev1: EvalGlobal "Global Evaluation 1"
      expr = {freq*2*pi, imag(freq)/abs(freq), abs(freq)/imag(freq)/2}
      unit = {rad/s, 1, 1}
      descr = {Angular frequency, Damping ratio, Quality factor}
  std2mpf1: EvaluationGroup "Participation Factors (Study 2)" | data = dset2
    gev1: EvalGlobal "Global Evaluation 1"
      expr = {mpf1.pfLnormX, mpf1.pfLnormY, mpf1.pfLnormZ, mpf1.pfRnormX, mpf1.pfRnormY, mpf1.pfRnormZ, mpf1.mEffLX, mpf1.mEffLY, mpf1.mEffLZ, mpf1.mEffRX, mpf1.mEffRY, mpf1.mEffRZ}
      unit = {1, 1, 1, 1, 1, 1, kg, kg, kg, kg*m^2, kg*m^2, kg*m^2}
      descr = {"Participation factor, normalized, X-translation", "Participation factor, normalized, Y-translation", "Participation factor, normalized, Z-translation", "Participation factor, normalized, X-rotation", "Participation factor, normalized, Y-rotation", "Participation factor, normalized, Z-rotation", "Effective modal mass, X-translation", "Effective modal mass, Y-translation", "Effective modal mass, Z-translation", "Effective modal mass, X-rotation", "Effective modal mass, Y-rotation", "Effective modal mass, Z-rotation"}

Plots
  pg1: PlotGroup3D "Stress (solid)" | data = dset1
    surf1: Surface | expr = solid.mises
      def: Deform "Deformation" | expr = {u, v, w}; descr = Displacement field
  pg2: PlotGroup3D "Displacement 1" | data = dset1
    surf1: Surface | expr = w
      def: Deform "Deformation" | expr = {u, v, w}; descr = Displacement field
  pg4: PlotGroup1D "u_x" | data = dset1
    glob1: Global | expr = u_x
  pg5: PlotGroup3D "Mode Shape (solid)" | data = dset2
    surf1: Surface | data = dset2; expr = solid.disp_rms
      def: Deform "Deformation" | expr = {u, v, w}; descr = Displacement field
  pg6: PlotGroup3D "Mesh" on domains 5 | data = dset1
    mesh1: Mesh | meshdomain = volume

Exports
  img1: Image | size = current; unit = px; width = 800; height = 600; pngfilename = /Users/bfeng/Desktop/Untitled.png